<?xml version="1.0"?>
<?xml-stylesheet type="text/xsl" href="http://jsbsim.sourceforge.net/JSBSim.xsl"?>
<fdm_config name="AeroSim Cessna Autopilot Controller" version="2.0" release="BETA"
    xmlns:xsi="http://www.w3.org/2001/XMLSchema-instance"
    xsi:noNamespaceSchemaLocation="http://jsbsim.sourceforge.net/JSBSim.xsd">

    <fileheader>
        <author> Unknown </author>
        <filecreationdate> 2002-01-01 </filecreationdate>
        <version> $Id: c172r.xml,v 1.20 2012/12/22 15:22:20 jberndt Exp $ </version>
        <description>
            AeroSim example of modeling a Cessna Autopilot Controller. This is based
            on executing autopilot control logic based on JSBSim's c310ap.xml. The
            airplane's physical parameters are set to a minimal set of dummy values,
            and all state variable parameters needed as inputs to the autopilot are
            remapped to external parameter names so that no internal state of this
            JSBSim instance's dynamics model are used.
        </description>
      <note>
        This model was created using publicly available data, publicly available
        technical reports, textbooks, and guesses. It contains no proprietary or
        restricted data. If this model has been validated at all, it would be
        only to the extent that it seems to "fly right", and that it possibly
        complies with published, publicly known, performance data (maximum speed,
        endurance, etc.). Thus, this model is meant for educational and entertainment
        purposes only.

        This simulation model is not endorsed by the manufacturer. This model is not
        to be sold.
      </note>
    </fileheader>

    <metrics></metrics>

    <mass_balance>
        <emptywt unit="LBS"> 1 </emptywt>
    </mass_balance>

    <ground_reactions></ground_reactions>

    <aerodynamics>
        <axis name="DRAG"></axis>
        <axis name="SIDE"></axis>
        <axis name="LIFT"></axis>
        <axis name="ROLL"></axis>
        <axis name="PITCH"></axis>
        <axis name="YAW"></axis>
    </aerodynamics>


    <system file="GNCUtilities_aerosim"/>

    <autopilot file="c172r_ap_aerosim">
        <!-- Roll channel A/P gains -->
        <property value="50.0"> ap/roll-pid-kp </property>
        <property value="5.0"> ap/roll-pid-ki </property>
        <property value="17.0"> ap/roll-pid-kd </property>
    </autopilot>

</fdm_config>
